*Heading
** Job name: Job-1 Model name: Model-1
** Generated by: Abaqus/CAE 2024
*Preprint, echo=NO, model=NO, history=NO, contact=NO
**
** PARTS
**
*Part, name=Part-1
*Node
      1,         100.,         100.,          10.
      2,         100.,          95.,          10.
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*Element, type=C3D8
  1,   64,   65,   86,   85,    1,    2,   23,   22
  2,   65,   66,   87,   86,    2,    3,   24,   23
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*Nset, nset=Set-1, generate
    1,  1323,     1
*Elset, elset=Set-1, generate
   1,  800,    1
** Section: Section-1
*Solid Section, elset=Set-1, material=SHOTLEONV2
,
*End Part
**
**
** ASSEMBLY
**
*Assembly, name=Assembly
**
*Instance, name=Part-1-1, part=Part-1
*End Instance
**
*Nset, nset=Set-1, instance=Part-1-1, generate
   21,  1323,    21
*Elset, elset=Set-1, instance=Part-1-1, generate
  20,  800,   20
*Elset, elset=_Surf-1_S6, internal, instance=Part-1-1, generate
   1,  781,   20
*Surface, type=ELEMENT, name=Surf-1
_Surf-1_S6, S6
*End Assembly
**
** MATERIALS
**
*Material, name=SHOTLEONV2
** const auto nStateVarsRequired = ( 9 + nKelvin * ( 6 + 1 + 1 ) ) + 1
** 9 + 8 * 12 + 1= 106
*Depvar
     106,
*User Material, constants=27, unsymm
**E28,          E1,         flowMag,        flowExponent,       flowDelay,      nu,         tTransition,        tDelay
28400,          18000,      14,             1.,                 0.0,            0.2,        0.5,                0.3
**vResidual,    nKelvin,    kelvinMin,      strainShrInf,       TauShr,         fcu28,      fcu1,               ratioFcy
1e-2,           12,         1e-5,           -0.0000,            360,            40.85,      18.56,              0.1
**ratioFbu,     ratioFtu,   eCPP1,          eCPP8,              eCPP24,         Gfi         enableDamage,       dTStatic,
1.16,           0.1,        -0.03,          -0.0007,            -0.0007,        0.1,         1,                 1e-3
**castTime,     timeToDays, enableNonlinearCreep
0,              1.0,        1.0
**
** BOUNDARY CONDITIONS
**
** Name: clamp_bottom Type: Symmetry/Antisymmetry/Encastre
*Boundary
Set-1, ENCASTRE
** ----------------------------------------------------------------
**
** STEP: idle_1d
**
*Step, name=idle_1d, nlgeom=NO
*Static
0.01, 1., 1e-05, 0.01
**
** OUTPUT REQUESTS
**
*Restart, write, frequency=0
**
** FIELD OUTPUT: F-Output-1
**
*Output, field, variable=PRESELECT
**
** HISTORY OUTPUT: H-Output-1
**
*Output, history, variable=PRESELECT
*End Step
** ----------------------------------------------------------------
**
** STEP: load_at_1d
**
*Step, name=load_at_1d, nlgeom=NO
*Static
1e-05, 0.001, 1e-08, 1e-05
**
** LOADS
**
Name: Load-1   Type: Pressure
*Dsload
Surf-1, P, 1.
**
** OUTPUT REQUESTS
**
*Restart, write, frequency=0
**
** FIELD OUTPUT: F-Output-1
**
*Output, field, variable=PRESELECT
**
** HISTORY OUTPUT: H-Output-1
**
*Output, history, variable=PRESELECT
*End Step
** ----------------------------------------------------------------
**
** STEP: idle_27d
**
*Step, name=idle_27d, nlgeom=NO
*Static
0.27, 27., 0.00027, 0.27
**
** OUTPUT REQUESTS
**
*Restart, write, frequency=0
**
** FIELD OUTPUT: F-Output-1
**
*Output, field, variable=PRESELECT
**
** HISTORY OUTPUT: H-Output-1
**
*Output, history, variable=PRESELECT
*End Step
** ----------------------------------------------------------------
**
** STEP: load_at_28d
**
*Step, name=load_at_28d, nlgeom=NO
*Static
1e-05, 0.001, 1e-08, 1e-05
**
** LOADS
**
** Name: Load-1   Type: Pressure
*Dsload
Surf-1, P, 5.
**
** OUTPUT REQUESTS
**
*Restart, write, frequency=0
**
** FIELD OUTPUT: F-Output-1
**
*Output, field, variable=PRESELECT
**
** HISTORY OUTPUT: H-Output-1
**
*Output, history, variable=PRESELECT
*End Step
** ----------------------------------------------------------------
**
** STEP: idle_28d
**
*Step, name=idle_28d, nlgeom=NO
*Static
0.28, 28., 0.00028, 0.28
**
** OUTPUT REQUESTS
**
*Restart, write, frequency=0
**
** FIELD OUTPUT: F-Output-1
**
*Output, field, variable=PRESELECT
**
** HISTORY OUTPUT: H-Output-1
**
*Output, history, variable=PRESELECT
*End Step
